UTS_bolt := 170 ksi
Y_plate := 180 MPa
FOS := 2
Y_bolt := 0.577*UTS_bolt = 98.09 ksi  # Approx. at 500 Kelvin
P_c := 450 psi
d := 4.5 in
A := π/4*d^2 = 15.9043 in^2
F := P_c*A = 7156.94 lbf
# Combustion Chamber to Injector Plate - 1/4-20
# Bolt Shear
d_bolt := 0.185 in
A_bolt := π/4*d_bolt^2 = 0.0268803 in^2
N_bolts := ceil(F*FOS/(A_bolt*Y_bolt)) = 6
# Bearing
d_wall := 0.257 in
t := 0.21 in
A_wall := t*d = 0.945 in^2
N_bolts := ceil(F*FOS/(A_wall*Y_plate)) = 1
# Nozzle to Combustion Chamber - 1/4-20
# Pullout Load
d_m := 0.25 in - (0.6495*1/(20*1/in)) = 0.217525 in
L_thread := 0.5 in
N := 3*F/(π*d_m*Y_bolt*L_thread) = 0.640612
π*d_m*Y_bolt*L_thread/3 = 11172 lbf
